// SBML level 2 version 3

model BIOMD0000000012()
  // Elowitz2000 - Repressilator

  // Compartments:
  compartment cell = 1;

  // Species:
  substanceOnly species PX in cell = 0; PX is "LacI protein";
  substanceOnly species PY in cell = 0; PY is "TetR protein";
  substanceOnly species PZ in cell = 0; PZ is "cI protein";
  substanceOnly species X in cell = 0; X is "LacI mRNA";
  substanceOnly species Y in cell = 20; Y is "TetR mRNA";
  substanceOnly species Z in cell = 0; Z is "cI mRNA";

  // Parameters:
  eff = 20; eff is "translation efficiency";
  n = 2;
  KM = 40;
  tau_mRNA = 2; tau_mRNA is "mRNA half life";
  tau_prot = 10; tau_prot is "protein half life";
  var t_ave; t_ave is "average mRNA life time";
  ps_a = 0.5; ps_a is "tps_active";
  ps_0 = 0.0005; ps_0 is "tps_repr";

  // Assignment rules:
  t_ave := tau_mRNA/ln(2);
  beta := tau_mRNA/tau_prot;
  k_tl := eff/t_ave;
  a_tr := (ps_a - ps_0)*60;
  a0_tr := ps_0*60;
  kd_prot := ln(2)/tau_prot;
  kd_mRNA := ln(2)/tau_mRNA;
  alpha := a_tr*eff*tau_prot/(ln(2)*KM);
  alpha0 := a0_tr*eff*tau_prot/(ln(2)*KM);

  // Reactions:
  degradation_of_LacI_transcripts: X => ; kd_mRNA*X;
  degradation_of_TetR_transcripts: Y => ; kd_mRNA*Y;
  degradation_of_CI_transcripts: Z => ; kd_mRNA*Z;
  translation_of_LacI: => PX; k_tl*X;  // modifiers: X
  translation_of_TetR: => PY; k_tl*Y;  // modifiers: Y
  translation_of_CI: => PZ; k_tl*Z;  // modifiers: Z
  degradation_of_LacI: PX => ; kd_prot*PX;
  degradation_of_TetR: PY => ; kd_prot*PY;
  degradation_of_CI: PZ => ; kd_prot*PZ;
  transcription_of_LacI: => X; a0_tr + a_tr*KM^n/(KM^n + PZ^n);  // modifiers: PZ
  transcription_of_TetR: => Y; a0_tr + a_tr*KM^n/(KM^n + PX^n);  // modifiers: PX
  transcription_of_CI: => Z; a0_tr + a_tr*KM^n/(KM^n + PY^n);  // modifiers: PY

  // Unit definitions:
  unit volume = 1e-15 litre; volume is "cubic microns";
  unit substance = item; substance is "item";
  unit time = 60 second; time is "minute";
end
